OpenVSP model (file version 5), 3 components.
Geometry view with OpenVSP parameter names; values to 6 digits, angles in degrees, lengths in the model's unit.
Overall bounding box: X_Min=-0.111381 X_Len=0.461381 Y_Min=-1.32541 Y_Len=2.65081 Z_Min=-0.202173 Z_Len=0.404347

Wing "WingGeom"
  location (X Y Z) 0 0 0, rotation 0 0 0
  symmetric about XZ
  bounding box size 0.350004 2.20037 0.0885619
  mass: Density=516.852 Shell_Flag=0 Mass_Area=1 Mass_Prior=0
  totals: TotalSpan=2.2 TotalProjectedSpan=2.2 TotalChord=0.171908 TotalArea=0.290053 TotalAR=16.6866
  root: chord 0.35, twist 0, airfoil file "EH 3.0/12"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 BaseThickChord=0.120321 ThickChord=0.246
  sections:
    n   Span   Root_Chord  Tip_Chord  Area        Sweep  Sweep_Location  Dihedral  Twist  Twist_Location  tip airfoil
    1   0.02   0.35        0.3465     0.006965    0      0               0         0      0.25            airfoil file "EH 3.0/12"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 BaseThickChord=0.120321 ThickChord=0.237
    2   0.025  0.3465      0.3328     0.00849125  0      0               0         0      0.25            airfoil file "EH 3.0/12"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 BaseThickChord=0.120321 ThickChord=0.201
    3   0.03   0.3328      0.305      0.009567    0      0               0         0      0.25            airfoil file "EH 3.0/12"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 BaseThickChord=0.120321 ThickChord=0.142
    4   0.025  0.305       0.2755     0.00725625  0      0               0         0      0.25            airfoil file "EH 2.5/10"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 BaseThickChord=0.100447 ThickChord=0.104
    5   0.025  0.2755      0.2439     0.0064925   0      0               0         0.5    0.25            airfoil file "EH 2.5/10"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 BaseThickChord=0.100447 ThickChord=0.1
    6   0.03   0.2439      0.2084     0.0067845   0      0               0         1.2    0.25            as above
    7   0.025  0.2084      0.1847     0.00491375  0      0               0         1.7    0.25            as above
    8   0.025  0.1847      0.1694     0.00442625  0      0               0         2.3    0.25            airfoil file "EH 2.0/10"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 BaseThickChord=0.101161 ThickChord=0.1
    9   0.02   0.1694      0.1641     0.003335    0      0               0         2.2    0.25            as above
    10  0.09   0.1641      0.1539     0.01431     0      0               0         2.15   0.25            as above
    11  0.085  0.1539      0.1415     0.0125545   0      0               0         2.05   0.25            as above
    12  0.2    0.1415      0.1093     0.02508     0      0               0         1.75   0.25            airfoil file "Eh 1.0/7.0"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 BaseThickChord=0.0700918 ThickChord=0.1
    13  0.15   0.1093      0.0852     0.0145875   0      0               0         0.7    0.25            as above
    14  0.156  0.0852      0.0602     0.0113412   0      0               0         -0.7   0.25            airfoil file "EH 0.0/9.0"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 BaseThickChord=0.0900358 ThickChord=0.1
    15  0.119  0.0602      0.0397     0.00594405  0      0               0         -2.75  0.25            as above
    16  0.055  0.0397      0.0397     0.0021835   0      0               0         -3.6   0.25            as above
    17  0.01   0.0397      0.0397     0.000397    0      0               0         -3.65  0.25            as above
    18  0.01   0.0397      0.0397     0.000397    0      0               0         -3.7   0.25            as above
  SS_Control "Outerons": UStart=0.77451 UEnd=0.828431 Length_C_Start=0.25 Length_C_End=0.25 Length_Start=0.0112357 Length_End=0.00992473 LE_Flag=0 Surf_Type=2
  SS_Control "Elevators": UStart=0.1272 UEnd=0.3926 Length_C_Start=0.29 Length_C_End=0 Length_Start=0.0983238 Length_End=0 LE_Flag=0 Surf_Type=2
  SS_Control "Innerons": UStart=0.6 UEnd=0.69 Length_C_Start=0.25 Length_C_End=0.25 Length_Start=0.035375 Length_End=0.0225043 LE_Flag=0 Surf_Type=2

Propeller "RightProp", child of "WingGeom"
  location (X Y Z) -0.05 1.1 0, rotation 0 0 0
  bounding box size 0.0223636 0.353372 0.404347
  Design: Diameter=0.45 NumBlade=3 Beta34=20 UseBeta34Flag=1 Feather=0 Rotate=0 Precone=0 ReverseFlag=0 FoldAngle=0 PropMode=0 AF=151.538 CLi=0.538798 Chord=0.177656 Solidity=0.169649 ConstructXoC=0.5 FeatherAxisXoC=0.5 FeatherOffsetXoC=0
  cross sections:
    n  RadiusFrac  shape
    0  0.2         ellipse Ellipse_Height=0.009 Ellipse_Width=0.018
    1  0.4         NACA 16-series Chord=0.0374063 IdealCl=0.7 ThickChord=0.144074
    2  1           NACA 16-series Chord=0.02925 IdealCl=0.2 ThickChord=0.03
  Chord along r/R (cubic Bezier): 0.2: 0.08, 0.333333: 0.15, 0.466667: 0.2, 0.6: 0.2, 0.716667: 0.2, 0.833333: 0.2, 0.95: 0.2, 0.966667: 0.2, 0.983333: 0.2, 1: 0.13
  Twist along r/R (PCHIP): 0.2: 46.75, 0.75: 20, 1: 13
  Thick along r/R (cubic Bezier): 0.2: 0.5, 0.233333: 0.3, 0.266667: 0.225, 0.3: 0.2, 0.4: 0.125, 0.5: 0.115, 0.6: 0.1, 0.733333: 0.075, 0.866667: 0.055, 1: 0.03
  CLI along r/R (cubic Bezier): 0.2: 0, 0.266667: 0.7, 0.333333: 0.7, 0.4: 0.7, 0.466667: 0.7, 0.533333: 0.7, 0.6: 0.7, 0.733333: 0.7, 0.866667: 0.7, 1: 0.2

Propeller "LeftProp", child of "WingGeom"
  location (X Y Z) -0.1 -1.1 0, rotation 0 0 0
  bounding box size 0.0223636 0.353372 0.404347
  Design: Diameter=0.45 NumBlade=3 Beta34=20 UseBeta34Flag=1 Feather=0 Rotate=180 Precone=0 ReverseFlag=1 FoldAngle=0 PropMode=0 AF=151.538 CLi=0.538798 Chord=0.177656 Solidity=0.169649 ConstructXoC=0.5 FeatherAxisXoC=0.5 FeatherOffsetXoC=0
  cross sections:
    n  RadiusFrac  shape
    0  0.2         ellipse Ellipse_Height=0.009 Ellipse_Width=0.018
    1  0.4         NACA 16-series Chord=0.0374063 IdealCl=0.7 ThickChord=0.144074
    2  1           NACA 16-series Chord=0.02925 IdealCl=0.2 ThickChord=0.03
  blade curves as in "RightProp"

VSPAERO settings: Sref=0.290053 bref=2.2 cref=0.171908 Xcg=0 Ycg=-3.45951e-06 Zcg=0.0066111 AlphaStart=0 AlphaEnd=10 AlphaNpts=1 BetaStart=0 BetaEnd=0 BetaNpts=1 MachStart=0 MachEnd=0 MachNpts=1 ReCref=1e+07 Vinf=21.5 Rho=1.21
  control group "Elevators": DeflectionAngle=0
  control group "Outerons": DeflectionAngle=0
  control group "Innerons": DeflectionAngle=0
